# OpenSim document version 40000
Model ThoracoscapularShoulderModel-scaled:
  gravity: 0 -9.80665 0
  length_units: meters
  force_units: N
  credits:
    Ajay Seth, Meilin Dong, Ricardo Matias, Scott Delp. Parameters from van der Helm and Klein-Breteler
  publications:
    Frontiers in Neurorobotics: in In Press DSEM: van der Helm 1994 Klein-Breteler et al. 1996.
  Ground
  BodySet:
    Body thorax: mass=20.86663 [kg] mass_center=(-0.06271884 -0.1516507 0) inertia=(1.014231 0.4315662 1.014231 0 0 0)
        meshes=(thorax.vtp groundspine.vtp)
      WrapEllipsoid Thorax: xyz_body_rotation=(-0.17 -0.0383972 0.212232)
          translation=(-0.02334704 -0.1497116 0.07456772) quadrant=all dimensions=(0.0764668 0.173985 0.0749957)
      WrapEllipsoid EllipsoidSurface: translation=(-0.02122463 -0.01765514 0.08487345) quadrant=all
          dimensions=(0.105511 0.204106 0.105873)
    Body clavicle: mass=0.2302742 mass_center=(-0.01438354 0.005957469 0.06136172)
        inertia=(0.0002366793 0.0002366793 4.333791e-5 -1.851765e-5 -6.823639e-5 5.239875e-5) meshes=clavicle.vtp
      PhysicalOffsetFrame cp_in_clavicle: socket_parent=.. translation=(-0.03788744 0.018924 0.1359874) [meters]
    Body scapula: mass=0.3559106 mass_center=(-0.04767211 -0.03376315 -0.04175532)
        inertia=(0.0007831161 0.0007244675 0.0007831161 0.0002831235 0.0002577844 0.0001519007) meshes=scapula.vtp
      PhysicalOffsetFrame cp_in_scapula: socket_parent=.. translation=(-0.01182874 0.0001060178 -0.01454739)
      WrapCylinder Subscapuralis: xyz_body_rotation=(1 -1 1) translation=(-0.02188006 -0.03758764 -0.02711744)
          quadrant=-y radius=0.01188946 length=0.07700251
      WrapCylinder Tmajscapula: xyz_body_rotation=(-1.4854 -0.3354 -0.8754)
          translation=(-0.07784087 -0.1023598 -0.04783756) quadrant=-y radius=0.006980033 length=0.04798774
      WrapEllipsoid deltsca: xyz_body_rotation=(1.4823 0.1606 -0.4472)
          translation=(-0.02989853 -0.03219218 -0.04229949) quadrant=all dimensions=(0.0358837 0.0852728 0.0288887)
      WrapCylinder Infra: xyz_body_rotation=(1.87 -0.543 -2.355) translation=(-0.05066192 -0.04424017 -0.04358861)
          quadrant=-y radius=0.01829321 length=0.09504394
    Body humerus: mass=1.765018 mass_center=(0.02195012 -0.1187872 -0.01313621)
        inertia=(0.0102105 0.002122948 0.0102105 -0.0002890984 -0.000193487 0.0001022735) meshes=humerus.vtp
      WrapSphere hhead: translation=(-0.003889282 0.004154597 -0.002060587) quadrant=all radius=0.02530516
      WrapSphere hheadsupraTminor: translation=(-0.0009723204 0.004069806 0.002369677) quadrant=all radius=0.02420493
      WrapEllipsoid hheadInfra: xyz_body_rotation=(0.1419 0.13474 0.28117)
          translation=(0.0001215393 0.0008478766 -0.004945413) quadrant=all dimensions=(0.0354012 0.0207213 0.0311527)
    Body ulna: mass=0.8663224 mass_center=(0.009718 -0.09595 0.02429)
        inertia=(0.004242652 0.0009037091 0.003874271 0.0002483828 -5.968556e-5 0.000855898) meshes=ulna.vtp
      WrapCylinder PQ2: xyz_body_rotation=(1.39138 0.0689405 1.52245) translation=(-0.0012 -0.2092 0.0428) quadrant=all
          radius=0.007 length=0.01
    Body radius: mass=0.1830932 mass_center=(0.03363 -0.18156 0.0156)
        inertia=(0.00034377 6.94359e-5 3.155536e-5 2.362341e-5 -3.323267e-6 5.03036e-5) meshes=radius.vtp
    Body hand: mass=0.4114894 mass_center=(0.0006 -0.0905 -0.0365)
        inertia=(0.0005006063 0.0001492335 0.0005006063 0 0 0)
  JointSet:
    CustomJoint ground_thorax: socket_parent_frame=ground_offset socket_child_frame=thorax_offset
      Coordinate ground_thorax_rot_x: default_value=0.06971656 range=(-3.141593 3.141593) clamped=false locked=true
      Coordinate ground_thorax_rot_y: default_value=-0.06316956 range=(-3.141593 3.141593) clamped=false locked=true
      Coordinate ground_thorax_rot_z: default_value=-0.1821671 range=(-3.141593 3.141593) clamped=false locked=true
      Coordinate ground_thorax_tx: default_value=-0.004231307 range=(-3.141593 3.141593) clamped=false locked=true
      Coordinate ground_thorax_ty: default_value=0.00403036 range=(-3.141593 3.141593) clamped=false locked=true
      Coordinate ground_thorax_tz: default_value=-0.0007835185 range=(-3.141593 3.141593) clamped=false locked=true
      PhysicalOffsetFrame ground_offset: socket_parent=/ground translation=(0 0.8 0)
      PhysicalOffsetFrame thorax_offset: socket_parent=/bodyset/thorax translation=(0 0 0)
      SpatialTransform:
        TransformAxis rotation1: coordinates=ground_thorax_rot_x axis=(1 0 0) LinearFunction(coefficients=1 0)
        TransformAxis rotation2: coordinates=ground_thorax_rot_y axis=(0 1 0) LinearFunction(coefficients=1 0)
        TransformAxis rotation3: coordinates=ground_thorax_rot_z axis=(0 0 1) LinearFunction(coefficients=1 0)
        TransformAxis translation1: coordinates=ground_thorax_tx axis=(1 0 0) LinearFunction(coefficients=1 0)
        TransformAxis translation2: coordinates=ground_thorax_ty axis=(0 1 0) LinearFunction(coefficients=1 0)
        TransformAxis translation3: coordinates=ground_thorax_tz axis=(0 0 1) LinearFunction(coefficients=1 0)
    CustomJoint sternoclavicular: socket_parent_frame=thorax_offset socket_child_frame=clavicle_offset
      Coordinate clav_prot: default_value=-0.2998917 range=(-3.141593 3.141593) clamped=false locked=true
      Coordinate clav_elev: default_value=-0.06473725 range=(-3.141593 3.141593) clamped=false locked=true
      PhysicalOffsetFrame thorax_offset: socket_parent=/bodyset/thorax translation=(0.006712286 0.007072269 0.0271267)
      PhysicalOffsetFrame clavicle_offset: socket_parent=/bodyset/clavicle translation=(0 0 0)
      SpatialTransform: axes_held_at_zero=(rotation3 translation1 translation2 translation3)
        TransformAxis rotation1: coordinates=clav_prot axis=(0.0153 0.9892987 -0.1451) LinearFunction(coefficients=1 0)
        TransformAxis rotation2: coordinates=clav_elev axis=(-0.9944725 0 -0.104997) LinearFunction(coefficients=1 0)
    ScapulothoracicJoint scapulothoracic: socket_parent_frame=thorax_offset socket_child_frame=scapula_offset
        thoracic_ellipsoid_radii_x_y_z=(0.0829975 0.199991 0.083001) scapula_winging_axis_origin=(0 0)
        scapula_winging_axis_direction=0 [radians]
      Coordinate scapula_abduction: default_value=-0.3115611 range=(-3.141593 3.141593) clamped=false locked=true
      Coordinate scapula_elevation: default_value=-0.05049787 range=(-3.141593 3.141593) clamped=false locked=true
      Coordinate scapula_upward_rot: default_value=0.2082049 range=(-3.141593 3.141593) clamped=false locked=true
      Coordinate scapula_winging: default_value=0.2735852 range=(-1.570796 1.570796) clamped=false locked=true
      PhysicalOffsetFrame thorax_offset: socket_parent=/bodyset/thorax translation=(-0.0312246 -0.01765514 0.07487367)
          orientation=(0 -1.07 0) [radians]
      PhysicalOffsetFrame scapula_offset: socket_parent=/bodyset/scapula
          translation=(-0.05214375 -0.03762822 -0.0534712) orientation=(-0.5181 -1.1416 -0.2854)
    CustomJoint GlenoHumeral: socket_parent_frame=scapula_offset socket_child_frame=humerus_offset
      Coordinate plane_elv: default_value=2.844205e-11 range=(-1.5 3.141593) clamped=false
      Coordinate shoulder_elv: default_value=0.3216331 range=(-0.78 2.53) clamped=false
      Coordinate axial_rot: default_value=1.028832 range=(-1.570795 1.570795) clamped=false
      PhysicalOffsetFrame scapula_offset: socket_parent=/bodyset/scapula
          translation=(-0.008324525 -0.03277045 0.008593584)
      PhysicalOffsetFrame humerus_offset: socket_parent=/bodyset/humerus translation=(0 0 0)
      SpatialTransform: axes_held_at_zero=(translation1 translation2 translation3)
        TransformAxis rotation1: coordinates=plane_elv axis=(0 1 0) LinearFunction(coefficients=1 0)
        TransformAxis rotation2: coordinates=shoulder_elv axis=(-1 0 0) LinearFunction(coefficients=1 0)
        TransformAxis rotation3: coordinates=axial_rot axis=(-0.0846 0.9947 -0.0584) LinearFunction(coefficients=1 0)
    CustomJoint elbow: socket_parent_frame=humerus_offset socket_child_frame=ulna_offset
      Coordinate elbow_flexion: default_value=5.193488e-24 range=(0 2.268928) clamped=false
      PhysicalOffsetFrame humerus_offset: socket_parent=/bodyset/humerus
          translation=(0.007413945 -0.246223 -0.01267257)
      PhysicalOffsetFrame ulna_offset: socket_parent=/bodyset/ulna translation=(0 0 0)
      SpatialTransform: axes_held_at_zero=(rotation1 rotation2 translation1 translation2 translation3)
        TransformAxis rotation3: coordinates=elbow_flexion axis=(0.04940001 0.03660001 0.9981083)
            LinearFunction(coefficients=1 0)
    CustomJoint radioulnar: socket_parent_frame=ulna_offset socket_child_frame=radius_offset
      Coordinate pro_sup: default_value=0.598997 range=(-1.570796 1.570796) clamped=false locked=true
      PhysicalOffsetFrame ulna_offset: socket_parent=/bodyset/ulna translation=(0.0004 -0.011503 0.019999)
      PhysicalOffsetFrame radius_offset: socket_parent=/bodyset/radius translation=(0 0 0)
      SpatialTransform: axes_held_at_zero=(rotation1 rotation3 translation1 translation2 translation3)
        TransformAxis rotation2: coordinates=pro_sup axis=(-0.01716099 0.9926656 -0.119668)
            LinearFunction(coefficients=1 0)
    WeldJoint rc: socket_parent_frame=radius_offset socket_child_frame=hand_offset
      PhysicalOffsetFrame radius_offset: socket_parent=/bodyset/radius translation=(0.018 -0.242 0.025)
      PhysicalOffsetFrame hand_offset: socket_parent=/bodyset/hand translation=(0 0 0)
  ConstraintSet:
    PointConstraint AC: socket_body_1=/bodyset/clavicle socket_body_2=/bodyset/scapula
        location_body_1=(-0.0378874 0.018924 0.135987) location_body_2=(-0.0118287 0.000106018 -0.0145474)
  ForceSet:
    Millard2012EquilibriumMuscle [values shared by the 33 below unless stated]: optimal_force=1
        pennation_angle_at_optimal=0 [radians] max_contraction_velocity=10 activation_time_constant=0.01 [seconds]
        deactivation_time_constant=0.04 [seconds] minimum_activation=0.01
      ActiveForceLengthCurve: minimum_value=0
      ForceVelocityCurve: concentric_slope_at_vmax=0 concentric_slope_near_vmax=0.25 isometric_slope=5
          eccentric_slope_at_vmax=0 eccentric_slope_near_vmax=0.15 max_eccentric_velocity_force_multiplier=1.4
      FiberForceLengthCurve
      TendonForceLengthCurve
    Millard2012EquilibriumMuscle TrapeziusScapula_M: max_isometric_force=470.4 optimal_fiber_length=0.08557091
        tendon_slack_length=0.03291189 ignore_tendon_compliance=true
      PathPoint TrapeziusScapula5-P1: thorax (-0.08966313 -0.0003781466 -0.001881916)
      PathPoint TrapeziusScapula5-P2: scapula (-0.05077245 -0.001885859 -0.03469171)
      PathWrap: wrap_object=Thorax method=hybrid
    Millard2012EquilibriumMuscle TrapeziusScapula_S: max_isometric_force=1043 optimal_fiber_length=0.1023008
        tendon_slack_length=0.02450861 ignore_tendon_compliance=true
      PathPoint TrapeziusScapula2-P1: thorax (-0.0794333 0.04596867 -0.003863037)
      PathPoint TrapeziusScapula2-P2: scapula (-0.04510935 0.00664084 -0.02334592)
      PathWrap: wrap_object=Thorax method=hybrid
    Millard2012EquilibriumMuscle TrapeziusScapula_I: max_isometric_force=414.4 optimal_fiber_length=0.1337973
        tendon_slack_length=0.0370483 ignore_tendon_compliance=true
      PathPoint TrapeziusScapula10-P1: thorax (-0.1078424 -0.1373331 0.00122504)
      PathPoint TrapeziusScapula10-P2: scapula (-0.06600341 -0.009108256 -0.07055328)
      PathWrap: wrap_object=Thorax method=hybrid
    Millard2012EquilibriumMuscle TrapeziusClavicle_S: max_isometric_force=201.6 optimal_fiber_length=0.1190159
        tendon_slack_length=0.02851312 ignore_tendon_compliance=true
      PathPoint TrapeziusClavicle1-P1: thorax (-0.06607805 0.1227786 0.002605412)
      PathPoint TrapeziusClavicle1-P2: clavicle (-0.03901013 0.02328116 0.1030503)
      PathWrap: wrap_object=Thorax method=hybrid
    Millard2012EquilibriumMuscle SerratusAnterior_I: max_isometric_force=430 optimal_fiber_length=0.1604719
        tendon_slack_length=0 ignore_tendon_compliance=true
      PathPoint SerratusAnterior4-P1: scapula (-0.09897942 -0.1081453 -0.08168532)
      PathPoint SerratusAnterior4-P2: thorax (-0.0005693551 -0.1739954 0.1579222)
      PathWrap: wrap_object=Thorax method=midpoint
    Millard2012EquilibriumMuscle SerratusAnterior_M: max_isometric_force=508 optimal_fiber_length=0.1529419
        tendon_slack_length=0.01193305 ignore_tendon_compliance=true
      PathPoint SerratusAnterior7-P1: scapula (-0.09382412 -0.07961342 -0.0920316)
      PathPoint SerratusAnterior7-P2: thorax (0.01771419 -0.07784198 0.1222223)
      PathWrap: wrap_object=Thorax method=hybrid
    Millard2012EquilibriumMuscle SerratusAnterior_S: max_isometric_force=387.8 optimal_fiber_length=0.09638791
        tendon_slack_length=0 ignore_tendon_compliance=true
      PathPoint SerratusAnterior12-P1: scapula (-0.04228508 0.008674533 -0.08084645)
      PathPoint SerratusAnterior12-P2: thorax (-0.03020409 -0.01482656 0.1058324)
      PathWrap: wrap_object=Thorax method=hybrid
    Millard2012EquilibriumMuscle Rhomboideus_S: max_isometric_force=200.2 optimal_fiber_length=0.1025861
        tendon_slack_length=0.0156064
      PathPoint Rhomboideus1-P1: thorax (-0.07778824 0.04100488 -0.002173108)
      PathPoint Rhomboideus1-P2: scapula (-0.07206157 -0.02208149 -0.09717402)
      PathWrap: wrap_object=Thorax method=hybrid
    Millard2012EquilibriumMuscle Rhomboideus_I: max_isometric_force=407.4 optimal_fiber_length=0.1166297
        tendon_slack_length=0.0283475
      PathPoint Rhomboideus4-P1: thorax (-0.09621123 -0.009460309 -0.0005432786)
      PathPoint Rhomboideus4-P2: scapula (-0.09725576 -0.1023126 -0.08729846)
      PathWrap: wrap_object=Thorax method=hybrid
    Millard2012EquilibriumMuscle LevatorScapulae: max_isometric_force=280 optimal_fiber_length=0.1586911
        tendon_slack_length=0.01910729 ignore_tendon_compliance=true
      PathPoint LevatorScapulae1-P1: thorax (-0.0369414 0.123545 0.03310809)
      PathPoint LevatorScapulae1-P2: scapula (-0.06799964 -0.007787802 -0.09827208)
      PathWrap: wrap_object=Thorax method=hybrid
    Millard2012EquilibriumMuscle Coracobrachialis: max_isometric_force=648.2 optimal_fiber_length=0.05877367
        tendon_slack_length=0.08949431 ignore_tendon_compliance=true
      PathPoint Coracobrachialis2-P1: scapula (0.007207264 -0.04089853 -0.02683233)
      PathPoint Coracobrachialis2-P2: humerus (-0.002807582 -0.1229419 -0.009612646)
    Millard2012EquilibriumMuscle DeltoideusClavicle_A: max_isometric_force=707.7 optimal_fiber_length=0.081948
        tendon_slack_length=0.07671727 pennation_angle_at_optimal=0.08726646
      PathPoint DeltoideusClavicle2-P1: clavicle (-0.02949427 0.01822394 0.09525686)
      PathPoint DeltoideusClavicle2-P2: scapula (0.01705206 -0.00634862 0.009931668)
      PathPoint DeltoideusClavicle2-P3: humerus (0.008074706 -0.09310077 0.001182185)
      PathWrap: wrap_object=deltsca method=hybrid
    Millard2012EquilibriumMuscle DeltoideusScapula_P: max_isometric_force=1324.4 optimal_fiber_length=0.08421627
        tendon_slack_length=0.06744401 pennation_angle_at_optimal=0.08726646
      PathPoint DeltoideusScapulaPost2-P1: scapula (-0.05032884 -0.006661378 -0.02600906)
      PathPoint DeltoideusScapulaPost2-P2: scapula (-0.04794496 -0.03119418 0.00702315)
      PathPoint DeltoideusScapulaPost2-P3: humerus (-0.00579249 -0.07305478 0.006428116)
      PathWrap: wrap_object=deltsca method=hybrid
    Millard2012EquilibriumMuscle DeltoideusScapula_M: max_isometric_force=2597.8 optimal_fiber_length=0.06566917
        tendon_slack_length=0.05618753 pennation_angle_at_optimal=0.08726646
      PathPoint DeltoideusScapulaLat10-P1: scapula (-0.01396453 0.001960398 0.007448378)
      PathPoint DeltoideusScapulaLat10-P2: scapula (-0.00447856 -0.006497178 0.02963822)
      PathPoint DeltoideusScapulaLat10-P3: humerus (-0.005241734 -0.08517286 0.003962055)
      PathWrap: wrap_object=deltsca method=hybrid
    Millard2012EquilibriumMuscle LatissimusDorsi_S: max_isometric_force=201.6 optimal_fiber_length=0.2244875
        tendon_slack_length=0.08623079
      PathPoint LatissimusDorsi1-P1: thorax (-0.107057 -0.1190249 0.001821581)
      PathPoint LatissimusDorsi1-P2: thorax (-0.1225727 -0.11878 0.03067925)
      MovingPathPoint LatissimusDorsi1-P3: thorax socket_x_coordinate=/jointset/GlenoHumeral/shoulder_elv
          socket_y_coordinate=/jointset/GlenoHumeral/shoulder_elv
          socket_z_coordinate=/jointset/GlenoHumeral/shoulder_elv
        x_location: MultiplierFunction: scale=1.061231
          SimmSpline: x=(0 3.14159) y=(-0.122564 -0.123775)
        y_location: MultiplierFunction: scale=1.02053
          SimmSpline: x=(0 3.14159) y=(-0.098615 -0.106769)
        z_location: MultiplierFunction: scale=1.065253
          SimmSpline: x=(0 3.14159) y=(0.101016 0.114972)
      MovingPathPoint LatissimusDorsi1-P4: thorax socket_x_coordinate=/jointset/GlenoHumeral/shoulder_elv
          socket_y_coordinate=/jointset/GlenoHumeral/shoulder_elv
          socket_z_coordinate=/jointset/GlenoHumeral/shoulder_elv
        x_location: MultiplierFunction: scale=1.061231
          SimmSpline: x=(0 3.14159) y=(-0.09279 -0.094357)
        y_location: MultiplierFunction: scale=1.02053
          SimmSpline: x=(0 3.14159) y=(-0.08329 -0.084707)
        z_location: MultiplierFunction: scale=1.065253
          SimmSpline: x=(0 3.14159) y=(0.13581 0.144557)
      PathPoint LatissimusDorsi1-P5: humerus (0.007146547 -0.01614359 -0.00355452)
      PathWrap: wrap_object=Thorax method=hybrid
    Millard2012EquilibriumMuscle LatissimusDorsi_M: max_isometric_force=315 optimal_fiber_length=0.2821665
        tendon_slack_length=0.1003981
      PathPoint LatissimusDorsi3-P1: thorax (-0.09638103 -0.2219145 -0.001661796)
      PathPoint LatissimusDorsi3-P2: thorax (-0.1142736 -0.2096584 0.0279416)
      MovingPathPoint LatissimusDorsi3-P3: thorax socket_x_coordinate=/jointset/GlenoHumeral/shoulder_elv
          socket_y_coordinate=/jointset/GlenoHumeral/shoulder_elv
          socket_z_coordinate=/jointset/GlenoHumeral/shoulder_elv
        x_location: MultiplierFunction: scale=1.061231
          SimmSpline: x=(0 3.14159) y=(-0.103889 -0.101761)
        y_location: MultiplierFunction: scale=1.02053
          SimmSpline: x=(0 3.14159) y=(-0.147585 -0.149604)
        z_location: MultiplierFunction: scale=1.065253
          SimmSpline: x=(0 3.14159) y=(0.113647 0.122566)
      MovingPathPoint LatissimusDorsi3-P4: thorax socket_x_coordinate=/jointset/GlenoHumeral/shoulder_elv
          socket_y_coordinate=/jointset/GlenoHumeral/shoulder_elv
          socket_z_coordinate=/jointset/GlenoHumeral/shoulder_elv
        x_location: MultiplierFunction: scale=1.061231
          SimmSpline: x=(0 3.14159) y=(-0.076222 -0.077789)
        y_location: MultiplierFunction: scale=1.02053
          SimmSpline: x=(0 3.14159) y=(-0.110351 -0.111768)
        z_location: MultiplierFunction: scale=1.065253
          SimmSpline: x=(0 3.14159) y=(0.140024 0.148771)
      PathPoint LatissimusDorsi3-P5: humerus (0.007025008 -0.03476299 -0.001030298)
      PathWrap: wrap_object=Thorax method=hybrid
    Millard2012EquilibriumMuscle LatissimusDorsi_I: max_isometric_force=270.2 optimal_fiber_length=0.3261468
        tendon_slack_length=0.0661497
      PathPoint LatissimusDorsi6-P1: thorax (-0.06658162 -0.2600514 0.0965226)
      PathPoint LatissimusDorsi6-P2: thorax (-0.07497423 -0.2101364 0.1358352)
      MovingPathPoint LatissimusDorsi6-P3: thorax socket_x_coordinate=/jointset/GlenoHumeral/shoulder_elv
          socket_y_coordinate=/jointset/GlenoHumeral/shoulder_elv
          socket_z_coordinate=/jointset/GlenoHumeral/shoulder_elv
        x_location: MultiplierFunction: scale=1.061231
          SimmSpline: x=(0 3.14159) y=(-0.040258 -0.031577)
        y_location: MultiplierFunction: scale=1.02053
          SimmSpline: x=(0 3.14159) y=(-0.116638 -0.109479)
        z_location: MultiplierFunction: scale=1.065253
          SimmSpline: x=(0 3.14159) y=(0.146215 0.149666)
      PathPoint LatissimusDorsi6-P4: humerus (0.005128995 -0.04239387 -0.0001854527)
      PathWrap: wrap_object=Thorax method=hybrid
    Millard2012EquilibriumMuscle PectoralisMajorClavicle_S: max_isometric_force=408.8 optimal_fiber_length=0.09440818
        tendon_slack_length=0.01211471 ignore_tendon_compliance=true
      PathPoint PectoralisMajorClavicle1-P1: clavicle (0.005959317 0.006375251 0.05368033)
      PathPoint PectoralisMajorClavicle1-P2: humerus (0.01224533 -0.0357335 -0.002679539)
      PathWrap: wrap_object=Thorax method=hybrid
    Millard2012EquilibriumMuscle PectoralisMajorThorax_I: max_isometric_force=571.2 optimal_fiber_length=0.1862761
        tendon_slack_length=0.0437698 ignore_tendon_compliance=true
      PathPoint PectoralisMajorThorax2-P1: thorax (0.0564681 -0.1180349 0.0263544)
      PathPoint PectoralisMajorThorax2-P2: humerus (0.01215393 -0.02543629 0)
      PathWrap: wrap_object=Thorax method=hybrid
    Millard2012EquilibriumMuscle PectoralisMajorThorax_M: max_isometric_force=683.2 optimal_fiber_length=0.1471691
        tendon_slack_length=0.02550931 ignore_tendon_compliance=true
      PathPoint PectoralisMajorThorax5-P1: thorax (0.02073644 -0.03878196 0.01384803)
      PathPoint PectoralisMajorThorax5-P2: humerus (0.01237914 -0.02221764 -0.003246152)
      PathWrap: wrap_object=Thorax method=hybrid
    Millard2012EquilibriumMuscle TeresMajor: max_isometric_force=851.2 optimal_fiber_length=0.1297411
        tendon_slack_length=0.005520899 ignore_tendon_compliance=true
      PathPoint TeresMajor1-P1: scapula (-0.09101144 -0.1131648 -0.06886322)
      PathPoint TeresMajor1-P2: humerus (0.005250534 -0.03306718 -0.001751508)
      PathWrap: wrap_object=Thorax method=hybrid
      PathWrap pathwrap_0: wrap_object=Tmajscapula method=hybrid
    Millard2012EquilibriumMuscle Infraspinatus_I: max_isometric_force=1037.4 optimal_fiber_length=0.06517372
        tendon_slack_length=0.08086547
      PathPoint Infraspinatus3-P1: scapula (-0.08635718 -0.07792621 -0.0776191)
      PathPoint Infraspinatus3-P2: humerus (-0.02085873 -0.004858303 0.02555879)
      PathWrap: wrap_object=Infra method=hybrid
      PathWrap pathwrap_0: wrap_object=hheadInfra method=hybrid
    Millard2012EquilibriumMuscle Infraspinatus_S: max_isometric_force=967.4 optimal_fiber_length=0.06533078
        tendon_slack_length=0.04679856
      PathPoint Infraspinatus5-P1: scapula (-0.07272408 -0.031103 -0.08298539)
      PathPoint Infraspinatus5-P2: humerus (-0.01742108 0.002305436 0.02287675)
      PathWrap: wrap_object=Infra method=hybrid
      PathWrap pathwrap_0: wrap_object=hheadInfra method=hybrid
    Millard2012EquilibriumMuscle PectoralisMinor: max_isometric_force=429.8 optimal_fiber_length=0.1148218
        tendon_slack_length=0.03097518 ignore_tendon_compliance=true
      PathPoint PectoralisMinor3-P1: thorax (0.05065217 -0.1061442 0.09713)
      PathPoint PectoralisMinor3-P2: scapula (0.009479207 -0.03377278 -0.02191261)
      PathWrap: wrap_object=Thorax method=hybrid
    Millard2012EquilibriumMuscle TeresMinor: max_isometric_force=695.8 optimal_fiber_length=0.05150866
        tendon_slack_length=0.04776257
      PathPoint TeresMinor2-P1: scapula (-0.0735434 -0.06366142 -0.04038981)
      PathPoint TeresMinor2-P2: humerus (-0.01928841 -0.007936124 0.01117864)
      PathWrap: wrap_object=hheadsupraTminor method=hybrid
    Millard2012EquilibriumMuscle Subscapularis_S: max_isometric_force=540.4 optimal_fiber_length=0.06030001
        tendon_slack_length=0.0526287 pennation_angle_at_optimal=0.08726646
      PathPoint Subscapularis3-P1: scapula (-0.06867949 -0.03013912 -0.08622229)
      PathPoint Subscapularis3-P2: humerus (0.02187732 -0.0001950121 -0.01236348)
      PathWrap: wrap_object=Subscapuralis method=hybrid
      PathWrap pathwrap_0: wrap_object=hhead method=hybrid
    Millard2012EquilibriumMuscle Subscapularis_M: max_isometric_force=609 optimal_fiber_length=0.06500572
        tendon_slack_length=0.0480553 pennation_angle_at_optimal=0.08726646
      PathPoint Subscapularis4-P1: scapula (-0.07284612 -0.05292426 -0.07139354)
      PathPoint Subscapularis4-P2: humerus (0.01992175 0.0008120967 -0.02002396)
      PathWrap: wrap_object=Subscapuralis method=hybrid
      PathWrap pathwrap_0: wrap_object=hhead method=hybrid
    Millard2012EquilibriumMuscle Subscapularis_I: max_isometric_force=854 optimal_fiber_length=0.06499363
        tendon_slack_length=0.0531848
      PathPoint Subscapularis9-P1: scapula (-0.08287041 -0.09411868 -0.08154349)
      PathPoint Subscapularis9-P2: humerus (0.01334975 -0.002888989 -0.02011741)
      PathWrap: wrap_object=Subscapuralis method=hybrid
      PathWrap pathwrap_0: wrap_object=hhead method=hybrid
    Millard2012EquilibriumMuscle Supraspinatus_P: max_isometric_force=326.2 optimal_fiber_length=0.0556483
        tendon_slack_length=0.02353989
      PathPoint Supraspinatus2-P1: scapula (-0.05276267 -0.001330092 -0.0472361)
      PathPoint Supraspinatus2-P2: humerus (0.0123603 0.008112234 0.0206579)
      PathWrap: wrap_object=hheadsupraTminor method=hybrid
    Millard2012EquilibriumMuscle Supraspinatus_A: max_isometric_force=543.2 optimal_fiber_length=0.05235818
        tendon_slack_length=0.0292979
      PathPoint Supraspinatus4-P1: scapula (-0.04270647 0.001306623 -0.06614364)
      PathPoint Supraspinatus4-P2: humerus (0.02160981 0.01495653 0.009942342)
      PathWrap: wrap_object=Thorax method=hybrid
      PathWrap pathwrap_0: wrap_object=hheadsupraTminor method=hybrid
    Millard2012EquilibriumMuscle TRIlong: max_isometric_force=1580.6 optimal_fiber_length=0.08334052
        tendon_slack_length=0.2074526 pennation_angle_at_optimal=0.174533
      PathPoint TRIlong2-P1: ulna (-0.019462 -0.0291087 0.00865977)
      PathPoint TRIlong2-P2: scapula (-0.03669765 -0.05002558 -0.01234168)
    Millard2012EquilibriumMuscle BIC_long: max_isometric_force=485.8 optimal_fiber_length=0.1252925
        tendon_slack_length=0.226438
      PathPoint P1: scapula (-0.01968891 -0.01573833 -0.01732298)
      PathPoint P2: humerus (0.01437895 0.02386071 0.02064554)
      PathPoint P3: radius (-0.00088465 -0.0439944 -0.00945516)
      PathWrap: wrap_object=hhead method=hybrid
    Millard2012EquilibriumMuscle BIC_brevis: max_isometric_force=693 optimal_fiber_length=0.1105705
        tendon_slack_length=0.1854389
      PathPoint BIC_brevis2-P1: scapula (0.008322319 -0.03683984 -0.02315238)
      PathPoint BIC_brevis2-P2: radius (0.00020307 -0.0442563 -0.00985953)
    CoordinateActuator ground_thorax_rot_x_actuator: coordinate=ground_thorax_rot_x optimal_force=40
    CoordinateActuator ground_thorax_rot_y_actuator: coordinate=ground_thorax_rot_y optimal_force=40
    CoordinateActuator ground_thorax_rot_z_actuator: coordinate=ground_thorax_rot_z optimal_force=40
    CoordinateActuator ground_thorax_tx_actuator: coordinate=ground_thorax_tx optimal_force=40
    CoordinateActuator ground_thorax_ty_actuator: coordinate=ground_thorax_ty optimal_force=500
    CoordinateActuator ground_thorax_tz_actuator: coordinate=ground_thorax_tz optimal_force=40
    CoordinateActuator elbow_actuator: coordinate=elbow_flexion optimal_force=20
    CoordinateActuator pro_sup_actuator: coordinate=pro_sup optimal_force=20
    CoordinateActuator scapula_elevation_actuator: coordinate=scapula_elevation optimal_force=1
    CoordinateActuator clav_prot_actuator: coordinate=clav_prot optimal_force=1
    CoordinateActuator clav_elev_actuator: coordinate=clav_elev optimal_force=1
    CoordinateActuator scapula_abduction_actuator: coordinate=scapula_abduction optimal_force=1
    CoordinateActuator scapula_upward_rot_actuator: coordinate=scapula_upward_rot optimal_force=1
    CoordinateActuator scapula_winging_actuator: coordinate=scapula_winging optimal_force=1
    CoordinateActuator plane_elv_actuator: coordinate=plane_elv optimal_force=1
    CoordinateActuator shoulder_elv_actuator: coordinate=shoulder_elv optimal_force=1
    CoordinateActuator axial_rot_actuator: coordinate=axial_rot optimal_force=1
    PrescribedForce hand_external_force: socket_frame=/bodyset/hand pointIsGlobal=false forceIsGlobal=true
      FunctionSet forceFunctions: Constant(value=0) Constant(value=0) Constant(value=0)
      FunctionSet pointFunctions: Constant(value=0) Constant(value=0) Constant(value=0)
      FunctionSet torqueFunctions: Constant(value=0) Constant(value=0) Constant(value=0)
  MarkerSet:
    Marker ij: thorax (0.004762393 -0.003327747 0.0009181394)
    Marker c7: thorax (-0.09541164 0.03342919 0)
    Marker t8: thorax (-0.1179618 -0.1576016 0)
    Marker px: thorax (0.07403541 -0.1676838 0)
    Marker ClavicleMassCenter: clavicle (-0.02814352 0.009415267 0.07594026)
    Marker acc: clavicle (-0.03667091 0.01734585 0.1325707)
    Marker sc: clavicle (0 0 0)
    Marker ScapulaMassCenter: scapula (-0.04020198 -0.03074527 -0.04360415)
    Marker ScapulaThoracicContactPt: scapula (-0.05214411 -0.03762673 -0.05349027)
    Marker ac: scapula (-0.01039456 -0.001895677 -0.01684937)
    Marker ai: scapula (-0.100586 -0.112222 -0.08694409)
    Marker ts: scapula (-0.07204582 -0.002027705 -0.08586185)
    Marker aa: scapula (-0.02293131 0.006743905 0.02201901)
    Marker HumerusMassCenter: humerus (0.006526731 -0.09744573 -0.002689072)
    Marker gu: humerus (0.01141008 0.004713519 0.01075969)
    Marker EpL: humerus (0.00163709 -0.242174 0.022923)
    Marker EpM: humerus (0.001803847 -0.2391128 -0.04600402)
    Marker centelbow: humerus (0.00109386 -0.240965 -0.00999386)
    Marker centijc7: thorax (-0.0440412 0.0166346 0)
    Marker centpxt8: thorax (-0.01945597 -0.1617795 0.001003221)
    Marker ijc: clavicle (-0.01236112 -0.001728002 -0.02870323)
    Marker Glenoid_Center: scapula (-0.02827489 -0.03641871 -0.01907939) fixed=true
    Marker HumHead_Center: humerus (0 0 0)
    Marker Glenoid_Edge: scapula (-0.03436539 -0.04111464 -0.01087362)
    Marker endpoint: hand (0 0 0) fixed=true
